Wed Jun  7 18:26:40 KST 2023
;Model Desc: Base population model w. covariance step
;Project Name: chapter5
;Project ID: NO PROJECT DESCRIPTION

$PROB RUN# 402 POPULATION DATA
$INPUT C ID TIME DV AMT
$DATA  402.csv IGNORE=C
$SUBROUTINES  ADVAN3 TRANS4

$PK
  TVV1=THETA(1)
  V1=TVV1*EXP(ETA(1))

  TVCL=THETA(2)
  CL=TVCL*EXP(ETA(2))

  TVV2=THETA(3)
  V2=TVV2*EXP(ETA(3))

  TVQ=THETA(4)
  Q=TVQ*EXP(ETA(4))

  S1=V1
$ERROR
  Y=F*(1+EPS(1))

$THETA
(0,9.8) ;[V1]
(0,3.7) ;[CL]
(0,8.6) ;[V2]
(0,31)  ;[Q]

$OMEGA
    0.02 ; [P]
    0.02 ; [P]
    0.02 ; [P]
    0.02 ; [P]

$SIGMA
    0.02 ; [P]

$ESTIMATION METHOD=1 MAXEVAL=9999 INTER PRINT=5 FORMAT=,1PE13.6
$COV
$TABLE ID TIME DV IPRE=CIPRED AMT CL V1 Q V2 ETA1 ETA2 ETA3 ETA4
          CWRES IRES=CIRES IWRE=CIWRES NPD NPDE ESAMPLE=1000
          NOPRINT FILE=402.tab FORMAT=s1PE12.5

NM-TRAN MESSAGES
 WARNINGS AND ERRORS (IF ANY) FOR PROBLEM    1
 (WARNING  2) NM-TRAN INFERS THAT THE DATA ARE POPULATION.
Note: Analytical 2nd Derivatives are constructed in FSUBS but are never used.
      You may insert $ABBR DERIV2=NO after the first $PROB to save FSUBS construction and compilation time

1NONLINEAR MIXED EFFECTS MODEL PROGRAM (NONMEM) VERSION 7.5.1
 ORIGINALLY DEVELOPED BY STUART BEAL, LEWIS SHEINER, AND ALISON BOECKMANN
 CURRENT DEVELOPERS ARE ROBERT BAUER, ICON DEVELOPMENT SOLUTIONS,
 AND ALISON BOECKMANN. IMPLEMENTATION, EFFICIENCY, AND STANDARDIZATION
 PERFORMED BY NOUS INFOSYSTEMS.
 PROBLEM NO.:         1
 RUN# 402 POPULATION DATA
 TOT. NO. OF OBS RECS:      360
 TOT. NO. OF INDIVIDUALS:       30
 TWO COMPARTMENT MODEL (ADVAN3)
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 #TBLN:      1
 #METH: First Order Conditional Estimation with Interaction
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
 #TERM:
0MINIMIZATION SUCCESSFUL
 NO. OF FUNCTION EVALUATIONS USED:      282
 NO. OF SIG. DIGITS IN FINAL EST.:  3.5

 ETABAR IS THE ARITHMETIC MEAN OF THE ETA-ESTIMATES,
 AND THE P-VALUE IS GIVEN FOR THE NULL HYPOTHESIS THAT THE TRUE MEAN IS 0.

 ETABAR:        -2.3376E-03  2.3641E-03 -2.6894E-03 -1.7748E-04
 SE:             1.9718E-02  2.3009E-02  2.3704E-02  2.4590E-02
 N:                      30          30          30          30

 P VAL.:         9.0563E-01  9.1816E-01  9.0967E-01  9.9424E-01

 ETASHRINKSD(%)  1.1434E+01  1.0825E+01  2.4008E+01  1.1542E+01
 ETASHRINKVR(%)  2.1561E+01  2.0478E+01  4.2252E+01  2.1753E+01
 EBVSHRINKSD(%)  1.1325E+01  1.0912E+01  2.4239E+01  1.1491E+01
 EBVSHRINKVR(%)  2.1367E+01  2.0633E+01  4.2603E+01  2.1662E+01
 RELATIVEINF(%)  7.8240E+01  7.1009E+01  5.1215E+01  7.8202E+01
 EPSSHRINKSD(%)  1.2856E+01
 EPSSHRINKVR(%)  2.4058E+01


 TOTAL DATA POINTS NORMALLY DISTRIBUTED (N):          360
 N*LOG(2PI) CONSTANT TO OBJECTIVE FUNCTION:    661.63574390736437
 OBJECTIVE FUNCTION VALUE WITHOUT CONSTANT:    196.00834164125718
 OBJECTIVE FUNCTION VALUE WITH CONSTANT:       857.64408554862155
 REPORTED OBJECTIVE FUNCTION DOES NOT CONTAIN CONSTANT

 TOTAL EFFECTIVE ETAS (NIND*NETA):                           120


 #TERE:
 Elapsed estimation  time in seconds:     0.69
 Elapsed covariance  time in seconds:     0.41
 Elapsed postprocess time in seconds:     0.28

 ********************               FIRST ORDER CONDITIONAL ESTIMATION WITH INTERACTION              ********************
 #OBJT:**************                       MINIMUM VALUE OF OBJECTIVE FUNCTION                      ********************
 #OBJV:********************************************      196.008       **************************************************

 ********************               FIRST ORDER CONDITIONAL ESTIMATION WITH INTERACTION              ********************
 ********************                             FINAL PARAMETER ESTIMATE                           ********************

 THETA - VECTOR OF FIXED EFFECTS PARAMETERS   *********
         TH 1      TH 2      TH 3      TH 4
         9.76E+00  3.88E+00  3.08E+01  8.77E+00

 OMEGA - COV MATRIX FOR RANDOM EFFECTS - ETAS  ********
         ETA1      ETA2      ETA3      ETA4
 ETA1
+        1.49E-02
 ETA2
+        0.00E+00  2.00E-02
 ETA3
+        0.00E+00  0.00E+00  2.92E-02
 ETA4
+        0.00E+00  0.00E+00  0.00E+00  2.32E-02

 SIGMA - COV MATRIX FOR RANDOM EFFECTS - EPSILONS  ****
         EPS1
 EPS1
+        8.84E-03

 OMEGA - CORR MATRIX FOR RANDOM EFFECTS - ETAS  *******
         ETA1      ETA2      ETA3      ETA4
 ETA1
+        1.22E-01
 ETA2
+        0.00E+00  1.41E-01
 ETA3
+        0.00E+00  0.00E+00  1.71E-01
 ETA4
+        0.00E+00  0.00E+00  0.00E+00  1.52E-01

 SIGMA - CORR MATRIX FOR RANDOM EFFECTS - EPSILONS  ***
         EPS1
 EPS1
+        9.40E-02

 ********************               FIRST ORDER CONDITIONAL ESTIMATION WITH INTERACTION              ********************
 ********************                            STANDARD ERROR OF ESTIMATE                          ********************

 THETA - VECTOR OF FIXED EFFECTS PARAMETERS   *********
         TH 1      TH 2      TH 3      TH 4
         2.43E-01  1.07E-01  1.28E+00  2.73E-01

 OMEGA - COV MATRIX FOR RANDOM EFFECTS - ETAS  ********
         ETA1      ETA2      ETA3      ETA4
 ETA1
+        3.42E-03
 ETA2
+       .........  5.25E-03
 ETA3
+       ......... .........  1.12E-02
 ETA4
+       ......... ......... .........  5.65E-03

 SIGMA - COV MATRIX FOR RANDOM EFFECTS - EPSILONS  ****
         EPS1
 EPS1
+        6.59E-04

 OMEGA - CORR MATRIX FOR RANDOM EFFECTS - ETAS  *******
         ETA1      ETA2      ETA3      ETA4
 ETA1
+        1.40E-02
 ETA2
+       .........  1.86E-02
 ETA3
+       ......... .........  3.27E-02
 ETA4
+       ......... ......... .........  1.86E-02

 SIGMA - CORR MATRIX FOR RANDOM EFFECTS - EPSILONS  ***
         EPS1
 EPS1
+        3.51E-03

 ********************               FIRST ORDER CONDITIONAL ESTIMATION WITH INTERACTION              ********************
 ********************                          COVARIANCE MATRIX OF ESTIMATE                         ********************

            TH 1      TH 2      TH 3      TH 4      OM11      OM12      OM13      OM14      OM22      OM23      OM24      OM33
             OM34      OM44      SG11
 TH 1
+        5.91E-02
 TH 2
+        1.40E-02  1.15E-02
 TH 3
+        1.32E-01 -6.80E-03  1.65E+00
 TH 4
+        2.52E-02  1.29E-02  2.01E-01  7.45E-02
 OM11
+       -1.37E-04 -8.96E-05 -3.96E-04 -2.23E-05  1.17E-05
 OM12
+       ......... ......... ......... ......... ......... .........
 OM13
+       ......... ......... ......... ......... ......... ......... .........
 OM14
+       ......... ......... ......... ......... ......... ......... ......... .........
 OM22
+       -2.30E-04 -6.35E-05 -2.41E-04 -1.29E-04  6.13E-06 ......... ......... .........  2.75E-05
 OM23
+       ......... ......... ......... ......... ......... ......... ......... ......... ......... .........
 OM24
+       ......... ......... ......... ......... ......... ......... ......... ......... ......... ......... .........
 OM33
+       -3.67E-04 -1.65E-04 -3.51E-03 -5.17E-04  8.94E-06 ......... ......... ......... -1.43E-05 ......... .........  1.25E-04
 OM34
+       ......... ......... ......... ......... ......... ......... ......... ......... ......... ......... ......... .........
         .........
 OM44
+       -6.76E-05 -8.06E-05 -1.32E-03 -4.40E-04  1.61E-06 ......... ......... .........  8.61E-06 ......... .........  2.98E-05
         .........  3.20E-05
 SG11
+       -2.51E-05 -1.65E-05 -1.91E-04 -5.83E-05 -2.80E-07 ......... ......... ......... -1.03E-06 ......... .........  1.97E-06
         .........  8.75E-07  4.35E-07

 ********************               FIRST ORDER CONDITIONAL ESTIMATION WITH INTERACTION              ********************
 ********************                          CORRELATION MATRIX OF ESTIMATE                        ********************

            TH 1      TH 2      TH 3      TH 4      OM11      OM12      OM13      OM14      OM22      OM23      OM24      OM33
             OM34      OM44      SG11
 TH 1
+        2.43E-01
 TH 2
+        5.39E-01  1.07E-01
 TH 3
+        4.22E-01 -4.95E-02  1.28E+00
 TH 4
+        3.80E-01  4.43E-01  5.73E-01  2.73E-01
 OM11
+       -1.64E-01 -2.44E-01 -9.02E-02 -2.39E-02  3.42E-03
 OM12
+       ......... ......... ......... ......... ......... .........
 OM13
+       ......... ......... ......... ......... ......... ......... .........
 OM14
+       ......... ......... ......... ......... ......... ......... ......... .........
 OM22
+       -1.80E-01 -1.13E-01 -3.58E-02 -9.00E-02  3.41E-01 ......... ......... .........  5.25E-03
 OM23
+       ......... ......... ......... ......... ......... ......... ......... ......... ......... .........
 OM24
+       ......... ......... ......... ......... ......... ......... ......... ......... ......... ......... .........
 OM33
+       -1.35E-01 -1.38E-01 -2.45E-01 -1.69E-01  2.34E-01 ......... ......... ......... -2.43E-01 ......... .........  1.12E-02
 OM34
+       ......... ......... ......... ......... ......... ......... ......... ......... ......... ......... ......... .........
         .........
 OM44
+       -4.92E-02 -1.33E-01 -1.82E-01 -2.85E-01  8.33E-02 ......... ......... .........  2.90E-01 ......... .........  4.71E-01
         .........  5.65E-03
 SG11
+       -1.56E-01 -2.34E-01 -2.26E-01 -3.24E-01 -1.24E-01 ......... ......... ......... -2.97E-01 ......... .........  2.67E-01
         .........  2.35E-01  6.59E-04
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 Elapsed finaloutput time in seconds:     0.02
 #CPUT: Total CPU Time in Seconds,        1.430
